# Первый слой сети
# Входы | Коэффициенты передачи и смещения | Состояние слоя | Функция активации
A(x) := 1/(1 + e^(-x))
X_0 := [0; 1]
W_0 := [1.0, 0.5; -1.0, 2.0]
Offset_0 := [1; 1]
Y_0 := W_0*X_0 + Offset_0 = [1.5; 3]
# Второй слой
X_1 := A(Y_0) = [0.817574; 0.952574]
W_1 := [1.5, -1.0]
Offset_1 := [1]
Y_1 := W_1*X_1 + Offset_1 = [1.27379]
# Выход сети
X_2 := A(Y_1) = [0.78139]
# Итерационый подход к вычислению
Forvard(X, W, Offset, Activation) :=
    In[0] ← X
    for i ∈ 0 .. rows(W) - 1
        Y[i] ← W[i]*In[i] + Offset[i]
        In[i + 1] ← Activation(Y[i])
    [In; Y]
W := [W_0; W_1]
Offset := [Offset_0; Offset_1]
Result := Forvard(X_0, W, Offset, A)
# Выход сети | Ожидаемое значение
Z := Result[0][2] = [0.78139]
Z_0 := [1]
# Обратное распространение ошибки | Производная функции возбуждения по выходу
# По выходу - разница реального и ожидаемого значения | Достигнутая точность
A_diff.inv(x) := x*(1 - x)
Δ_1 := Z_0 - Z = [0.21861]
err_1 := vectorize(Δ_1*A_diff.inv(Z)) = [0.0373428]
σ := 1/2*sum(vectorize(Δ_1^2)) = 0.0238951
Δ_0 := transpose(W_1)*err_1
err_0 := vectorize(Δ_0*A_diff.inv(X_1)) = [0.00835431; -0.00168702]
# Обучение
# коэффициент скорости
ρ := 0.5
ΔW_0 := (err_0*transpose(X_0))*ρ = [0, 0.00417716; 0, -0.000843511]
W_0 = [1, 0.5; -1, 2]
W1_0 := W_0 + ΔW_0 = [1, 0.504177; -1, 1.99916]
Offset1_0 := Offset_0 + err_0*ρ = [1.00418; 0.999156]
ΔW_1 := (err_1*transpose(X_1))*ρ = [0.0152652, 0.0177859]
W_1 = [1.5, -1]
W1_1 := W_1 + ΔW_1 = [1.51527, -0.982214]
Offset1_1 := Offset_1 + err_1*ρ = [1.01867]
Result1 := Forvard(X_0, [W1_0; W1_1], [Offset1_0; Offset1_1], A)
Z1 := Result1[0][2] = [0.78982]
Δ1_1 := Z_0 - Z1 = [0.21018]
σ1 := 1/2*sum(vectorize(Δ1_1^2)) = 0.0220879
Δσ := σ - σ1 = 0.00180722
