# Функция активации Сигмоид (логистическая)
Sigma(x) := vectorize(1/(1 + e^(-x)))
d/dx(1/(1 + e^(-x))) → e^(-x)/(e^(-x) + 1)^2
# Производная функции активации
# По значению входа
# По известному значению выхода
dSigmaU(u) := vectorize(u*(1 - u))
dSigmaX(x) := vectorize(e^(-x)/(1 + e^(-x))^2)
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d/dx(e^(-x)/(1 + e^(-x))^2) → 2*e^(-2*x)/(e^(-x) + 1)^3 - e^(-x)/(e^(-x) + 1)^2
# Определение сети
GetTopology(Inputs, N) :=
    count ← rows(N)
    M ← stack([Inputs], N)
    Seed(13)
    for i ∈ 0 .. count - 1
        w ← matrix(M[i + 1], M[i], f(n, m) ← rnorm(1, 0, 1)[0])
        offset ← matrix(M[i + 1], 1, f(n, m) ← 1)
        T[i] ← transpose([w, offset])
    T
T := GetTopology(2, [2; 1])
Forvard(T, X) :=
    N ← rows(T)
    for i ∈ 0 .. N - 1
        [W, Offset] ← transpose(T[i])
        u ← W*X + Offset
        X ← Sigma(u)
        Y[i] ← X
    Y
Backvard(T, X, Y_out, ρ) :=
    N ← rows(T)
    XX[0] ← X
    for i ∈ 0 .. N - 1
        [W, Offset] ← transpose(T[i])
        u ← W*X + Offset
        X ← Sigma(u)
        Y[i] ← X
        U[i] ← u
    e ← Y_out - Y[N - 1]
    XX ← stack(XX, Y)
    for i ∈ N - 1 .. 0
        [W, Offset] ← transpose(T[i])
        δ ← vectorize(e*dSigmaU(Y[i]))
        e ← transpose(W)*δ
        T2[i] ← transpose([W + ρ*δ*transpose(XX[i]), Offset + ρ*δ])
    transpose([T2, 1/2*sum(vectorize((Y_out - Y[N - 1])^2))])
T[0] := transpose([[1.0, 0.5; -1, 2.0], [1; 1]])
T[1] := transpose([[1.5, -1], [1]])
# Первый слой
T[0][0] = [1, 0.5; -1, 2]
Forvard(T, [0; 1])[1] = [0.78139]
[T_2; err2] := Backvard(T, [0; 1], [1], 0.5)
T_2[0][1] = [1.00418; 0.999156]
Forvard(T_2, [0; 1])[1] = [0.78982]
# Вход
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# Матрица связей | Смещение
In_0 := [0; 1]
W_0 := [1.0, 0.5; -1, 2.0]
Offset_0 := [1; 1]
# Возбуждение слоя | Выход слоя
U_0 := W_0*In_0 + Offset_0
U_0 = [1.5; 3]
Out_0 := Sigma(U_0)
In_1 := Out_0 = [0.817574; 0.952574]
W_1 := [1.5, -1]
Offset_1 := [1]
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transpose(W_1)*In_1 + Offset_1 = [1.27379]
U_1 := W_1*In_1 + Offset_1
U_1 = [1.27379]
Out_1 := Sigma(U_1)
Out_1 = [0.78139]
# Считаем что корректное значение на выходе сети должно быть = 1
ExpectedOut := [1]
Err2 := sum(vectorize((ExpectedOut - Out_1)^2))/2
Err2 = 0.0238951  # Ошибка по выходу сети (СКО)
# Ошибки на выходах слоёв
ExpectedOut - Out_1 = [0.21861]
δ_1 := (ExpectedOut - Out_1)*dSigmaU(Out_1)
# на выходном слое ошибка рассчитывается по ожидаемому значению на выходе слоя
δ_1 = 0.0373428
δ_0 := vectorize(transpose(W_1)*δ_1*dSigmaU(Out_0))
# на промежуточных слоях ошибка вычисляется по ошибке предыдущего слоя
δ_0 = [0.00835431; -0.00168702]
# Корректируем коэффициенты матриц слоёв на основе значений ошибок
ρ := 0.5
ρ*δ_0*transpose(In_0) = [0, 0.00417716; 0, -0.000843511]
δ_0 = [0.00835431; -0.00168702]
In_0 = [0; 1]
ρ*[0.0083543*0, 0.0083543*1; -0.001687*0, -0.001687*1] = [0, 0.00417715; 0, -0.0008435]
ΔW_0 := ρ*δ_0*transpose(In_0)
W_0 = [1, 0.5; -1, 2]
W1_0 := W_0 + ΔW_0 = [1, 0.504177; -1, 1.99916]
ΔW_0 = [0, 0.00417716; 0, -0.000843511]
ΔOffset_0 := ρ*δ_0 = [0.00417716; -0.000843511]
Offset_0 = [1; 1]
Offset1_0 := Offset_0 + ΔOffset_0 = [1.00418; 0.999156]
δ_1 = 0.0373428
In_1 = [0.817574; 0.952574]
ρ*δ_1*transpose(In_1) = [0.0152652, 0.0177859]
ρ*transpose([0.0373428*0.818; 0.0373428*0.953]) = [0.0152732, 0.0177938]
ΔW_1 := ρ*δ_1*transpose(In_1)
W_1 = [1.5, -1]
W1_1 := W_1 + ΔW_1 = [1.51527, -0.982214]
ΔW_1 = [0.0152652, 0.0177859]
ΔOffset_1 := ρ*δ_1 = 0.0186714
Offset_1 = [1]
Offset1_1 := Offset_1 + ΔOffset_1 = [1.01867]
U1_0 := W1_0*In_0 + Offset1_0
U1_0 = [1.50835; 2.99831]
Out1_0 := Sigma(U1_0) = [0.818817; 0.952498]
In1_1 := Out1_0 = [0.818817; 0.952498]
W1_1 = [1.51527, -0.982214]
Offset1_1 = [1.01867]
Out_1 = [0.78139]
U1_1 := W1_1*In1_1 + Offset1_1
U1_1 = [1.32384]
Out1_1 := Sigma(U1_1)
Out1_1 = [0.78982]
Err2 = 0.0238951
Err12 := sum(vectorize((ExpectedOut - Out1_1)^2))/2
Err12 = 0.0220879
ΔErr := Err2 - Err12 = 0.00180722
